Clear

Set DefaultBaseFrequency=50

New circuit.lvNetwork basekv=11 pu= 1.00 angle=30 frequency=50 phases=3 ISC3=3000 ISC1=2500
!New Reactor.grndSrc phases=1 bus1=sourcebus.4 bus2=sourcebus.0 R=0.0 X=1E-10

New Transformer.TR1 Buses=[SourceBus.1.2.3 TRbus.1.2.3.4] Conns=[Delta Wye] kVs=[11 0.416] kVAs=[800 800] XHL=1 phases=3 sub=y ! taps=[1.0 0.972]
New Reactor.grndTR phases=1 bus1=TRbus.4 bus2=TRbus.0 X=1E-10


Redirect LineCode_3f4w.dss
Redirect Lines.dss
Redirect LoadShapes.dss
Redirect Loads.dss

New EnergyMeter.EM1 Element=Line.LINE1a Terminal=1  localonly=no
New EnergyMeter.EM2 Element=Line.LINE906a Terminal=1  localonly=no
New EnergyMeter.EM3 Element=Line.LINE1410a Terminal=1  localonly=no
New EnergyMeter.EM4 Element=Line.LINE1913a Terminal=1  localonly=no

Buscoords Buscoords.dss
